ORIGIN := 1
A := [5; 5]
B := [12; 12]
C := [14; 3]
AB := B - A
# Параметрическое уравнение точки D и отрезка CD
D(t) := A + AB*t
CD(t) := D(t) - C
# Условие перпендикулярности  AB и СD
transpose(CD(t))*AB == 0 solve, t → 1/2
t := 1/2
# Координаты точки D
D := D(t) → [17/2; 17/2]
φ := π/4
T := [cos(φ), sin(φ); -sin(φ), cos(φ)]  # Матрица поворота
# Задаем отрезки до поворота
AB := transpose(augment(A, B))
CD := transpose(augment(C, D))
TA := D + T*(A - D)
TB := D + T*(B - D)
TC := D + T*(C - D)
# Задаем отрезки после поворота
TD := D
TAB := transpose(augment(TA, TB))
TCD := transpose(augment(TC, TD))
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# Исходные отрезки - сплошная линия
# Повёрнутые отрезки - пунктирный вид
