A := [7; 10; 1]
B := [11; 17; 1]
C := [15; 9; 1]
# Найдем координаты середин сторон AB и AC
CAB := (A + B)/2 = [9; 13.5; 1]
CBC := (B + C)/2 = [13; 13; 1]
# Найдем уравнения медиан как уравнения прямых проходящих через 2 точки
x := 0
y := 0
Given
(x - A[0])/(CBC[0] - A[0]) == (y - A[1])/(CBC[1] - A[1])
(x - C[0])/(CAB[0] - C[0]) == (y - C[1])/(CAB[1] - C[1])
[x; y] := Find(x, y)
X := transpose([A[0], B[0], C[0], A[0]])
Y := transpose([A[1], B[1], C[1], A[1]])
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# Сдвигаем систему координат в точку пересечения медиан
delX := x - 0 = 11
delY := y - 0 = 12
COORDS := augment(A, B, C) = [7, 11, 15; 10, 17, 9; 1, 1, 1]
MS1 := [1, 0, -delX; 0, 1, -delY; 0, 0, 1] = [1, 0, -11; 0, 1, -12; 0, 0, 1]
SDVIG1COORDS := MS1*COORDS = [-4, 0, 4; -2, 5, -3; 1, 1, 1]
R := π*45/180 = 0.785398
MP(x) := [cos(x), -sin(x), 0; sin(x), cos(x), 0; 0, 0, 1]
# Поворачиваем объект
ROTATECOORDS := MP(R)*SDVIG1COORDS = [-1.41421, -3.53553, 4.94975; -4.24264, 3.53553, 0.707107; 1, 1, 1]
delX := 0 - x = -11
delY := 0 - y = -12
MS1 := [1, 0, -delX; 0, 1, -delY; 0, 0, 1] = [1, 0, 11; 0, 1, 12; 0, 0, 1]
# Сдвигаем систему координат обратно
SDVIG2COORDS := MS1*ROTATECOORDS = [9.58579, 7.46447, 15.9497; 7.75736, 15.5355, 12.7071; 1, 1, 1]
RX := transpose([SDVIG2COORDS[0, 0], SDVIG2COORDS[0, 1], SDVIG2COORDS[0, 2], SDVIG2COORDS[0, 0]])
RY := transpose([SDVIG2COORDS[1, 0], SDVIG2COORDS[1, 1], SDVIG2COORDS[1, 2], SDVIG2COORDS[1, 0]])
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