A := [6; 7; 1]
B := [10; 14; 1]
C := [14; 6; 1]
E := [6; 4; 1]
D := [12; 10; 1]
ABC := transpose(augment(A, B, C, A))
ED := transpose(augment(E, D))
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# Первая точка
x := 0
y := 0
Given
(x - C[0])/(A[0] - C[0]) == (y - C[1])/(A[1] - C[1])
(x - E[0])/(D[0] - E[0]) == (y - E[1])/(D[1] - E[1])
[x; y] := Find(x, y) = [8.66667; 6.66667]
# Вторая точка
x1 := 0
y1 := 0
Given
(x1 - B[0])/(C[0] - B[0]) == (y1 - B[1])/(C[1] - B[1])
(x1 - E[0])/(D[0] - E[0]) == (y1 - E[1])/(D[1] - E[1])
[x1; y1] := Find(x1, y1) = [12; 10]
# Проверка на пересечение | с помощью псевдоскалярного произведения
dpx1 := C[0] - B[0]
dpy1 := C[1] - B[1]
dpx := x1 - B[0]
dpy := y1 - B[1]
S := dpx1*dpy - dpx*dpy1
if(S == 0, "Прямая пересекает BC", "Прямая не пересекает треугольник") = "Прямая пересекает BC"
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