A := [6; 7]
B := [10; 16]
C := [14; 5]
D := [5; 3]
E := [8; 12]
ABC := transpose(augment(A, B, C, A))
DE := transpose(augment(D, E))
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# Первая точка
x := 0
y := 0
Given
(x - A[0])/(B[0] - A[0]) == (y - A[1])/(B[1] - A[1])
(x - E[0])/(D[0] - E[0]) == (y - E[1])/(D[1] - E[1])
[x; y] := Find(x, y) = [7.33333; 10]
# Вторая точка
x1 := 0
y1 := 0
Given
(x1 - C[0])/(A[0] - C[0]) == (y1 - C[1])/(A[1] - C[1])
(x1 - E[0])/(D[0] - E[0]) == (y1 - E[1])/(D[1] - E[1])
[x1; y1] := Find(x1, y1) = [6.30769; 6.92308]
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